# OpenSim document version 40500
MarkerSet:
  Marker Clavicle: torso (0.03724615 0.3740428 0)
  Marker RAcromium: torso (-0.03 0.44 0.15)
  Marker LAcromium: torso (-0.03 0.44 -0.15)
  Marker C7: torso (-0.07706833 0.4444985 -0.00168382)
  Marker T10: torso (-0.1 0.1887 0.004401705)
  Marker RASIS: pelvis (0.016008 0.0111575 0.128)
  Marker LASIS: pelvis (0.01600799 0.01115748 -0.128)
  Marker VSacral: pelvis (-0.1744644 0.04567345 -0.004963572)
  Marker RKneeLat: femur_r (0.03070356 -0.4235555 0.05)
  Marker RKneeMed: femur_r (0.0307036 -0.4375587 -0.05)
  Marker RHip: femur_r (-0.01148779 -0.01883763 0.08130636)
  Marker RShankFront: tibia_r (0.05131284 -0.1204971 -0.002462977)
  Marker RAnkleLat: tibia_r (-0.005 -0.41 0.053)
  Marker RAnkleMed: tibia_r (0.006 -0.3888 -0.038)
  Marker RHeel: calcn_r (-0.02 -0.004091303 0)
  Marker RToeLat: calcn_r (0.19 0.00329348 0.065)
  Marker RToeTip: calcn_r (0.26 0.00329348 0)
  Marker LKneeLat: femur_l (0.0307036 -0.423556 -0.05) fixed=true
  Marker LKneeMed: femur_l (0.0307036 -0.437559 0.05)
  Marker LHip: femur_l (-0.0114878 -0.0188376 -0.0813064)
  Marker LShankFront: tibia_l (0.0513128 -0.120497 0.00246298)
  Marker LAnkleLat: tibia_l (-0.005 -0.41 -0.053)
  Marker LAnkleMed: tibia_l (0.006 -0.3888 0.038)
  Marker LHeel: calcn_l (-0.02 -0.0040913 0)
  Marker LToeLat: calcn_l (0.19 0.00329348 -0.065)
  Marker LToeTip: calcn_l (0.26 0.00329348 0)
