# OpenSim document version 40500
InverseKinematicsTool subject01:
  model_file: scaled_model.osim
  constraint_weight: 20
  accuracy: 1e-5
  time_range: 26 31
  output_motion_file: E:\OneDrive\Jin Wei\PKU\Projects\20250619 Wang Zilu exoskeleton evaluation\Exoskeleton Structure Optimization\LJT_JW_TRY\uphill_walking_calibrated_IK.mot
  marker_file: uphill_walking_calibrated.trc
  IKTaskSet IK:
    IKMarkerTask Clavicle: apply=true weight=1
    IKMarkerTask RAcromium: apply=true weight=0.5
    IKMarkerTask LAcromium: apply=true weight=0.5
    IKMarkerTask C7: apply=true weight=0.1
    IKMarkerTask T10: apply=true weight=0.1
    IKMarkerTask RASIS: apply=true weight=10
    IKMarkerTask LASIS: apply=true weight=10
    IKMarkerTask VSacral: apply=true weight=10
    IKMarkerTask RKneeLat: apply=true weight=1
    IKMarkerTask RKneeMed: apply=true weight=1
    IKMarkerTask RHip: apply=true weight=1
    IKMarkerTask RShankFront: apply=true weight=0.1
    IKMarkerTask RAnkleLat: apply=true weight=1
    IKMarkerTask RAnkleMed: apply=true weight=1
    IKMarkerTask RHeel: apply=true weight=10
    IKMarkerTask RToeLat: apply=true weight=1
    IKMarkerTask RToeTip: apply=true weight=1
    IKMarkerTask LKneeLat: apply=true weight=1
    IKMarkerTask LKneeMed: apply=true weight=1
    IKMarkerTask LHip: apply=true weight=1
    IKMarkerTask LShankFront: apply=true weight=0.1
    IKMarkerTask LAnkleLat: apply=true weight=1
    IKMarkerTask LAnkleMed: apply=true weight=1
    IKMarkerTask LHeel: apply=true weight=10
    IKMarkerTask LToeLat: apply=true weight=1
    IKMarkerTask LToeTip: apply=true weight=1
