# OpenSim document version 40500
AnalyzeTool model_scaled_no:
  model_file: scaled_model.osim
  replace_force_set: false
  results_directory: Joint Reaction Analysis
  output_precision: 8
  initial_time: 26
  final_time: 31
  solve_for_equilibrium_for_auxiliary_states: true
  maximum_number_of_integrator_steps: 20000
  maximum_integrator_step_size: 1
  minimum_integrator_step_size: 1e-8
  integrator_error_tolerance: 1e-5
  external_loads_file: uphill_walking_calibrated_grf.xml
  coordinates_file: uphill_walking_calibrated_IK.mot
  lowpass_cutoff_frequency_for_coordinates: 6
  AnalysisSet Analyses:
    JointReaction: start_time=26 end_time=31 step_interval=1 in_degrees=true
        forces_file=(E:\OneDrive\Jin Wei\PKU\Projects\20250619 Wang Zilu exoskeleton evaluation\Exoskeleton Structure Optimization\LJT_JW_TRY\Static Optimization\model_scaled_StaticOptimization_force_no_assistance.sto)
        joint_names=knee_r apply_on_bodies=child express_in_frame=parent
  ControllerSet Controllers:
    ControlSetController: controls_file=(Static Optimization/model_scaled_StaticOptimization_controls_no_assistance.xml)
