# OpenSim document version 40500
AnalyzeTool LJT_scaled:
  model_file: scaled_model.osim
  replace_force_set: false
  force_set_files: SO_Actuators.xml
  results_directory: Static Optimization
  output_precision: 8
  initial_time: 26
  final_time: 31
  solve_for_equilibrium_for_auxiliary_states: false
  maximum_number_of_integrator_steps: 20000
  maximum_integrator_step_size: 1
  minimum_integrator_step_size: 1e-8
  integrator_error_tolerance: 1e-5
  external_loads_file: uphill_walking_calibrated_forces.xml
  coordinates_file: uphill_walking_calibrated_IK.mot
  lowpass_cutoff_frequency_for_coordinates: 6
  AnalysisSet Analyses:
    StaticOptimization: start_time=26 end_time=31 step_interval=1 in_degrees=true use_model_force_set=true
        activation_exponent=2 use_muscle_physiology=true optimizer_convergence_criterion=0.0001
        optimizer_max_iterations=1000
