# OpenSim document version 40500
ScaleTool model_scaled:
  mass: 64 [kg]
  height: 1840
  age: 99
  notes: This is an example setup file for scale.exe.
  GenericModelMaker:
    marker_set_file: Scale_MarkerSet.xml
  ModelScaler:
    apply: true
    scaling_order: measurements manualScale
    marker_file: static.trc
    time_range: 1 2
    preserve_mass_distribution: true
    output_model_file: E:\OneDrive\Jin Wei\PKU\Projects\20250619 Wang Zilu exoskeleton evaluation\Exoskeleton Structure Optimization\LJT_JW_TRY\scaledOnly.osim
    output_scale_file: E:\OneDrive\Jin Wei\PKU\Projects\20250619 Wang Zilu exoskeleton evaluation\Exoskeleton Structure Optimization\LJT_JW_TRY\scaleSet_applied.xml
    MeasurementSet gait2354:
      Measurement torso: apply=false
        MarkerPair: markers=(C7 VSacral)
        MarkerPair: markers=(RAcromium VSacral)
        MarkerPair: markers=(LAcromium VSacral)
      Measurement pelvis: apply=true
        MarkerPair: markers=(RASIS VSacral)
        MarkerPair: markers=(LASIS VSacral)
        BodyScale pelvis: axes=(X Y Z)
      Measurement thigh: apply=true
        MarkerPair: markers=(RHip RKneeLat)
        MarkerPair: markers=(LHip LKneeLat)
        BodyScale femur_r: axes=(X Y Z)
        BodyScale femur_l: axes=(X Y Z)
      Measurement shank: apply=true
        MarkerPair: markers=(RKneeLat RAnkleLat)
        MarkerPair: markers=(LKneeLat LAnkleLat)
        BodyScale tibia_r: axes=(X Y Z)
        BodyScale tibia_l: axes=(X Y Z)
      Measurement foot: apply=true
        MarkerPair: markers=(RToeLat RHeel)
        MarkerPair: markers=(RToeTip RHeel)
        MarkerPair: markers=(LToeLat LHeel)
        MarkerPair: markers=(LToeTip LHeel)
        BodyScale calcn_r: axes=(X Y Z)
        BodyScale calcn_l: axes=(X Y Z)
    ScaleSet gait2354_Scale:
      Scale: scales=(1.14724 1.14724 1.14724) segment=femur_r apply=false
      Scale: scales=(0.988523 0.988523 0.988523) segment=tibia_r apply=false
      Scale: scales=(1.14724 1.14724 1.14724) segment=femur_l apply=false
      Scale: scales=(0.988523 0.988523 0.988523) segment=tibia_l apply=false
  MarkerPlacer:
    apply: true
    marker_file: static.trc
    time_range: 0 0.01
    output_motion_file: E:\OneDrive\Jin Wei\PKU\Projects\20250619 Wang Zilu exoskeleton evaluation\Exoskeleton Structure Optimization\LJT_JW_TRY\static_output.mot
    output_model_file: E:\OneDrive\Jin Wei\PKU\Projects\20250619 Wang Zilu exoskeleton evaluation\Exoskeleton Structure Optimization\LJT_JW_TRY\scaled_model.osim
    max_marker_movement: -1
    IKTaskSet gait2354_Scale:
      IKMarkerTask Clavicle: apply=true weight=10
      IKMarkerTask RAcromium: apply=true weight=100
      IKMarkerTask LAcromium: apply=true weight=100
      IKMarkerTask C7: apply=true weight=100
      IKMarkerTask T10: apply=true weight=1
      IKMarkerTask RASIS: apply=true weight=1000
      IKMarkerTask LASIS: apply=true weight=1000
      IKMarkerTask VSacral: apply=true weight=1000
      IKMarkerTask RKneeLat: apply=true weight=1000
      IKMarkerTask RKneeMed: apply=true weight=1000
      IKMarkerTask RHip: apply=true weight=1
      IKMarkerTask RShankFront: apply=true weight=1
      IKMarkerTask RAnkleLat: apply=true weight=100
      IKMarkerTask RAnkleMed: apply=true weight=100
      IKMarkerTask RHeel: apply=true weight=100
      IKMarkerTask RToeLat: apply=true weight=10
      IKMarkerTask RToeTip: apply=true weight=10
      IKMarkerTask LKneeLat: apply=true weight=1000
      IKMarkerTask LKneeMed: apply=true weight=1000
      IKMarkerTask LHip: apply=true weight=1
      IKMarkerTask LShankFront: apply=true weight=1
      IKMarkerTask LAnkleLat: apply=true weight=100
      IKMarkerTask LAnkleMed: apply=true weight=100
      IKMarkerTask LHeel: apply=true weight=100
      IKMarkerTask LToeLat: apply=true weight=10
      IKMarkerTask LToeTip: apply=true weight=10
