# OpenSim document version 20302
ExternalLoads Ex2:
  datafile: uphill_walking_calibrated_forces.mot
  ExternalForce leftGRF: applied_to_body=calcn_l force_expressed_in_body=ground point_expressed_in_body=ground
      force_identifier=ground_force1_v point_identifier=ground_force1_p torque_identifier=ground_torque1_
  ExternalForce rightFemurAssistance: applied_to_body=femur_r force_expressed_in_body=femur_r
      point_expressed_in_body=femur_r force_identifier=femur_assistance_force_v
      point_identifier=femur_assistance_force_p torque_identifier=femur_assistance_torque_
  ExternalForce rightTibiaAssistance: applied_to_body=tibia_r force_expressed_in_body=tibia_r
      point_expressed_in_body=tibia_r force_identifier=tibia_assistance_force_v
      point_identifier=tibia_assistance_force_p torque_identifier=tibia_assistance_torque_
  ExternalForce rightGRF: applied_to_body=calcn_r force_expressed_in_body=ground point_expressed_in_body=ground
      force_identifier=ground_force2_v point_identifier=ground_force2_p torque_identifier=ground_torque2_
